*Heading
WP08 M1 2x2 patch - restart continuation from STEP2 INC10
*Restart, Read, Step=2, Inc=10
*Step, Name=REPLAY_RESTART, Nlgeom=NO, Inc=8
*Static
30.0, 240.0, 30.0, 30.0
*Boundary, Op=NEW
LEFT, 1, 1, 0.0
BOTTOM, 2, 2, 0.0
LEFT, 8, 8, 1.0E7
RIGHT, 8, 8, 1.001E7
LEFT, 14, 14, 0.10
RIGHT, 14, 14, 0.101
*Output, Field, Frequency=1
*Node Output, Nset=ALLNODES
U, RF
*End Step
